// SBML level 2 version 4

model MesoRD_Test_System_Tutorial()
  // MesoRD Test System: Tutorial
  // This is a simple model of LacI with non-specific binding to DNA in the nucleoid.
  // Try running it with spatial discretization 0.5 um and 8 molecules shown per subvolume.
  // Colour the molecules as you like.
  // Turn off grid in the viewer using "g", use "Ctrl+mouse-left" to zoom and use mouse to rotate.
  // $Id: tutorial.xml 642 2012-01-05 14:14:06Z davidfange $

  // Compartments:
  compartment CompartmentNucl; CompartmentNucl has litre;
  compartment CompartmentCytopl; CompartmentCytopl has litre;

  // Species:
  substanceOnly species FN in CompartmentNucl = 0; FN is "A";  // substance in item
  substanceOnly species BN in CompartmentNucl = 10;  // substance in item
  substanceOnly species FC in CompartmentCytopl = 10; FC is "A";  // substance in item
  substanceOnly species BC in CompartmentCytopl = 0;  // substance in item

  // Parameters:
  kAttach = 200 ps;
  kDetach = 100 ps;

  // Reactions:
  LacBindingN: FN => BN; kAttach*FN;
  LacUnbinding: BN => FN; kDetach*BN;

  // Unit definitions:
  unit degree = 0.01745329 radian;
  unit Mps = mole / (litre * second);
  unit pMps = litre / (mole * second);
  unit ps = 1 / second;
  unit um = 1e-6 metre;
  unit cm2ps = (0.01 metre)^2 / second;
  unit um2ps = (1e-6 metre)^2 / second;
  unit pmus = 1 / (1e-6 second);
  unit mycentimetre = 0.01 metre;
end
