// SBML level 2 version 4

model MesoRD_Test_System_Tutorial()
  // MesoRD Tracking Tutorial: bimolecular reaction
  // This is a simple model of a fast-diffusing ligand that can bind to a slow-diffusing target confined to the nucleoid, with slow ligand degradation happening outside the nucleoid.
  // SMeagol example model, Martin Lindén 2015-09-16.

  // Compartments:
  compartment CompartmentNucl; CompartmentNucl has litre;
  compartment CompartmentCytopl; CompartmentCytopl has litre;

  // Species:
  substanceOnly species Lnucl in CompartmentNucl = 100; Lnucl is "Lac";  // substance in item
  substanceOnly species Lcyto in CompartmentCytopl = 0; Lcyto is "Lac";  // substance in item
  substanceOnly species Tnucl in CompartmentNucl = 1000;  // substance in item
  substanceOnly species Tcyto in CompartmentCytopl = 0;  // substance in item
  substanceOnly species LTnucl in CompartmentNucl = 0;  // substance in item
  substanceOnly species LTcyto in CompartmentCytopl = 0;  // substance in item

  // Parameters:
  kAttach = 3e8 pMps;
  kDetach = 50 ps;
  kDegrade = 0.1 ps;

  // Reactions:
  LacTassociation: Lnucl + Tnucl => LTnucl; kAttach*Lnucl*Tnucl;
  LacTdissociation: LTnucl => Lnucl + Tnucl; kDetach*LTnucl;
  LacDegradation1: Lcyto => ; kDegrade*Lcyto;

  // Unit definitions:
  unit degree = 0.01745329 radian;
  unit Mps = mole / (litre * second);
  unit pMps = litre / (mole * second);
  unit ps = 1 / second;
  unit um = 1e-6 metre;
  unit nm = 1e-9 metre;
  unit cm2ps = (0.01 metre)^2 / second;
  unit um2ps = (1e-6 metre)^2 / second;
  unit pmus = 1 / (1e-6 second);
  unit mycentimetre = 0.01 metre;
end
