// SBML level 2 version 4

model MesoRD_Test_System_Tutorial()
  // MesoRD Test System: Tutorial
  // This is a simple model of LacI with non-specific binding to DNA in the nucleoid, with free/bound state diffusiojn constants of 10 and 0.1 um^2/s.
  // SMeagol example model, Martin Lindén 2015-09-04.

  // Compartments:
  compartment CompartmentNucl; CompartmentNucl has litre;
  compartment CompartmentCytopl; CompartmentCytopl has litre;

  // Species:
  substanceOnly species FN in CompartmentNucl = 0; FN is "A";  // substance in item
  substanceOnly species BN in CompartmentNucl = 10;  // substance in item
  substanceOnly species FC in CompartmentCytopl = 10; FC is "A";  // substance in item
  substanceOnly species BC in CompartmentCytopl = 0;  // substance in item

  // Parameters:
  kAttach = 100 ps;
  kDetach = 50 ps;

  // Reactions:
  LacBindingN: FN => BN; kAttach*FN;
  LacUnbinding: BN => FN; kDetach*BN;

  // Unit definitions:
  unit degree = 0.01745329 radian;
  unit Mps = mole / (litre * second);
  unit pMps = litre / (mole * second);
  unit ps = 1 / second;
  unit um = 1e-6 metre;
  unit cm2ps = (0.01 metre)^2 / second;
  unit um2ps = (1e-6 metre)^2 / second;
  unit pmus = 1 / (1e-6 second);
  unit mycentimetre = 0.01 metre;
end
